ORIGIN := 1
# Задание 1
V := [3 + 7 + 1; 3 + 7 + 2; 3 + 7 + 3] = [11; 12; 13]
M := [3 + 7 + 1, 3 + 7 + 2, 3 + 7 + 3; 3 + 7 + 4, 3 + 7 + 5, 3 + 7 + 6; 3 + 7 + 7, 3 + 7 + 8, 3 + 7 + 9] = [11, 12, 13; 14, 15, 16; 17, 18, 19]
# Задание 2
Г := 3
N := 19
a := Г*N = 57
b := Г + N = 22
M1 := [2/(21 - 10), 2/(21 + 10); (21 - 10)/2, (21 + 10)/2] = [0.181818, 0.0645161; 5.5, 15.5]
M1 → [0.181818181818, 0.0645161290323; 5.5, 15.5]
M1[1, 1] → 0.181818181818
M1[1, 1] = 0.181818
M1[1, 2] = 0.0645161
M1[1, 2] → 0.0645161290323
M1[2, 2] = 15.5
M1[2, 1] = 5.5
M1[2, 1] → 5.5
M1[2, 2] → 15.5
# Задание 3
M2[3, 3] := Г + N + 9
M2[2, 2] := Г + N + 5
M2[1, 1] := Г + N + 1
M2[2, 3] := Г + N + 6
M2[1, 2] := Г + N + 2
M2[3, 1] := Г + N + 7
M2[1, 3] := Г + N + 3
M2[3, 2] := Г + N + 8
M2[2, 1] := Г + N + 4
M2 := [M2[1, 1], M2[1, 2], M2[1, 3]; M2[2, 1], M2[2, 2], M2[3, 2]; M2[3, 1], M2[3, 2], M2[3, 3]] = [23, 24, 25; 26, 27, 30; 29, 30, 31]
M2 → [23, 24, 25; 26, 27, 30; 29, 30, 31]
# Задание 4
V1 := M[:, 1] = [11; 14; 17]
V2 := transpose(M2)[:, 1] = [23; 24; 25]
transpose(V2) = [23, 24, 25]
# Задание 5
i1 := 1 .. 8
j1 := i1
i3 := 1 .. 4
S[i1, j1] := N*i1 + Г*j1
S = [
    22, 25, 28, 31, 34, 37, 40, 43;
    41, 44, 47, 50, 53, 56, 59, 62;
    60, 63, 66, 69, 72, 75, 78, 81;
    79, 82, 85, 88, 91, 94, 97, 100;
    98, 101, 104, 107, 110, 113, 116, 119;
    117, 120, 123, 126, 129, 132, 135, 138;
    136, 139, 142, 145, 148, 151, 154, 157;
    155, 158, 161, 164, 167, 170, 173, 176
]
X[i3] := 2*Г*i3 + 2*N
Y[i3] := X[i3]^2
X = [44; 50; 56; 62]
Y = [1936; 2500; 3136; 3844]
A[i3, 1] := X[i3]
A[i3, 2] := Y[i3]
A = [44, 1936; 50, 2500; 56, 3136; 62, 3844]
WRITEPRN("Matrix1") := A
R[i1, j1] := S[i1, j1]^2
WRITEPRN("Matrix2") := S
R = [
    484, 625, 784, 961, 1156, 1369, 1600, 1849;
    1681, 1936, 2209, 2500, 2809, 3136, 3481, 3844;
    3600, 3969, 4356, 4761, 5184, 5625, 6084, 6561;
    6241, 6724, 7225, 7744, 8281, 8836, 9409, 10000;
    9604, 10201, 10816, 11449, 12100, 12769, 13456, 14161;
    13689, 14400, 15129, 15876, 16641, 17424, 18225, 19044;
    18496, 19321, 20164, 21025, 21904, 22801, 23716, 24649;
    24025, 24964, 25921, 26896, 27889, 28900, 29929, 30976
]
WRITEPRN("Matrix3") := R
# Задание 6
A2 := READPRN("ВАРИАНТ_19.prn")
A2 = [
    46.07, 69.69, 93.32, 116.95, 140.57, 164.2, 187.83, 211.45, 235.08;
    68.51, 92.13, 115.76, 139.39, 163.01, 186.64, 210.27, 233.89, 257.52;
    90.95, 114.58, 138.2, 161.83, 185.46, 209.08, 232.71, 256.33, 279.96;
    113.39, 137.02, 160.64, 184.27, 207.9, 231.52, 255.15, 278.78, 302.4;
    135.83, 159.46, 183.08, 206.71, 230.34, 253.96, 277.59, 301.22, 324.84;
    158.27, 181.9, 205.52, 229.15, 252.78, 276.4, 300.03, 323.66, 347.28
]
# Задание 7
i := 1 .. 2
L := [N + Г + 1, N + Г + 2; N + Г + 3, N + Г + 4] = [23, 24; 25, 26]
j := 1 .. 2
M3[i, j] := L[i, j] + K[i, j]  # error: Это значение имеет единицы измерения: Temperature, а должно: Unitless.
K := [1, 0; -1, -1]
M3 =  # error: Эта переменная неопределена.
L + K = [24, 24; 24, 25]
L - K = [22, 24; 26, 27]
M4[i, j] := L[i, j] - K[i, j]
M4 = [22, 24; 26, 27]
N + L = [42, 43; 44, 45]
M5[i, j] := N + L[i, j]
M5 = [42, 43; 44, 45]
A3 := [N + Г + 1, N + Г + 3, N + Г + 5, N + Г + 7; N + Г + 2, N + Г + 4, N + Г + 6, N + Г + 8]
B3 := [N + Г + 1, N + Г + 5; N + Г + 2, N + Г + 6; N + Г + 3, N + Г + 7; N + Г + 4, N + Г + 8]
C3 := A3*B3
C3 = [2558, 2974; 2656, 3088]
sum(A3*B3, j = 1 .. 1) = [2558, 2974; 2656, 3088]
-L → [-23, -24; -25, -26]
T := -N*L = [-437, -456; -475, -494]
L*(-1) → [-23, -24; -25, -26]
-N*L = [-437, -456; -475, -494]
|C3| = 160
|V| → sqrt(434)
|V| = 20.8327
|C3| → 160
|C3| → 160
|V| =  # error: Эта матрица должна быть квадратной.
|C3| = 160
# V это вектор, а вектор не может быть квадратным
|V| → sqrt(434)
X := [N + Г + 10; N + Г + 11; N + Г + 12] = [32; 33; 34]
Y := [N + Г + 13; N + Г + 14; N + Г + 15] = [35; 36; 37]
X*Y = 3566
sum(X[j]*Y[j], j = 1 .. 3) = 3566
Z := X×Y = [-3; 6; -3]
Z := [
    X[2, 1]*Y[3, 1] - Y[2, 1]*X[3, 1];
    -(X[1, 1]*Y[3, 1] - X[3, 1]*Y[1, 1]);
    X[1, 1]*Y[2, 1] - X[2, 1]*Y[1, 1]
] = [-3; 6; -3]
transpose(X) = [32, 33, 34]
|X| = 57.1752
X = [32; 33; 34]
|Y| = 62.3699
ϕ := acos(X*Y/(|X|*|Y|)) = 0.0020607
Z = [-3; 6; -3]
Z1 := |X|*|Y|*sin(ϕ)
|Z| = 7.34847
Z1[1] := (-1)^(1 - 1)*[X[2, 1], X[3, 1]; Y[2, 1], Y[3, 1]] = [33, 34; 36, 37]
Z2[2] := (-1)^(2 - 1)*[X[1, 1], X[3, 1]; Y[2, 1], Y[3, 1]] = [-32, -34; -36, -37]
Z3[3] := (-1)^(3 - 1)*[X[1, 1], X[2, 1]; Y[1, 1], Y[2, 1]] = [32, 33; 35, 36]
sum(X) + sum(Y) = 207
X[1] + X[2] + X[3] + Y[1] + Y[2] + Y[3] = 207
tr(L) = 49
sum(L[j, j], j = 1 .. 2) = 49
M6 := [-N*π, -N*π/3; -N*π/2, N*π] = [-59.6903, -19.8968; -29.8451, 59.6903]
vectorize(sin(M6)) = [0, -0.866025; 1, 0]
A4 := [Г + N + 9, Г + N + 8, Г + N + 7; Г + N + 3, Г + N + 0, Г + N + 1; Г + N + 2, Г + N + 4, Г + N + 1] = [31, 30, 29; 25, 22, 23; 24, 26, 23]
A4^-1 → [23, -16, -13; 23/4, -17/4, -3; -61/2, 43/2, 17]
B[2, 2] := (-1)^(2 + 2)*det([31, 29; 24, 23])/|A4| = -4.25
B[1, 1] := (-1)^(1 + 1)*det([22, 23; 26, 23])/|A4|
|A4| → -4
B[2, 3] := (-1)^(2 + 3)*det([31, 29; 25, 23])/|A4| = -3
B[1, 2] := (-1)^(1 + 2)*det([30, 29; 26, 23])/|A4|
A4^-1 = [23, -16, -13; 5.75, -4.25, -3; -30.5, 21.5, 17]
B[3, 1] := (-1)^(3 + 1)*det([25, 22; 24, 26])/|A4| = -30.5
B[1, 3] := (-1)^(1 + 3)*det([30, 29; 22, 23])/|A4|
B5 := mod(N, 7) = 5
B5 := identity(mod(N, 5) + 2) = [
    1, 0, 0, 0, 0, 0;
    0, 1, 0, 0, 0, 0;
    0, 0, 1, 0, 0, 0;
    0, 0, 0, 1, 0, 0;
    0, 0, 0, 0, 1, 0;
    0, 0, 0, 0, 0, 1
]
B[3, 2] := (-1)^(3 + 2)*det([31, 30; 24, 26])/|A4| = 21.5
B[2, 1] := (-1)^(2 + 1)*det([25, 23; 24, 23])/|A4|
A4*A4^-1 = [1, 0, -5.68434e-14; -1.13687e-13, 1, 5.68434e-14; 0, 0, 1]
B[3, 3] := (-1)^(3 + 3)*det([31, 30; 25, 22])/|A4| = 17
A4^0 = [1, 0, 0; 0, 1, 0; 0, 0, 1]
B = [23, -16, -13; 5.75, -4.25, -3; -30.5, 21.5, 17]
V5 := [Г + N + 1; Г + N + 2; Г + N + 3] = [23; 24; 25]
C5 := diag(V5) = [23, 0, 0; 0, 24, 0; 0, 0, 25]
Z4 := submatrix(A4, 2, 3, 2, 3) = [22, 23; 26, 23]
Z5 := submatrix(A4, 3, 3, 2, 3) = [26, 23]
Z6 := submatrix(A4, 1, 3, 2, 2) = [30; 22; 26]
A4 = [31, 30, 29; 25, 22, 23; 24, 26, 23]
F := augment(V5, Z, Z6) = [23, -3, 30; 24, 6, 22; 25, -3, 26]
L = [23, 24; 25, 26]
L1 := [11, 12, 0; 13, 14, 0; 0, 0, 0] = [11, 12, 0; 13, 14, 0; 0, 0, 0]
G := stack(A4, L1) = [31, 30, 29; 25, 22, 23; 24, 26, 23; 11, 12, 0; 13, 14, 0; 0, 0, 0]
csort(G, 3) = [0, 0, 0; 13, 14, 0; 11, 12, 0; 24, 26, 23; 25, 22, 23; 31, 30, 29]
rsort(G, 6) = [30, 29, 31; 22, 23, 25; 26, 23, 24; 12, 0, 11; 14, 0, 13; 0, 0, 0]
V6 := [6*mod(N, 3) + 1; 2*mod(N, 4) + 1; 8*mod(N, 5) + 1] = [7; 7; 33]
sort(V6) = [7; 7; 33]
reverse(V6) = [33; 7; 7]
# Задание 8
K := [2, 1, 11, 5; 1, 1, 2, 0; 2, 1, 3, 0; 1, 1, 3, 4]
D := [2; 1; -3; -3]
lsolve(K, D) = [-5.48148; 3.51852; 1.48148; -1.37037]
K^-1*D = [-5.48148; 3.51852; 1.48148; -1.37037]
